// SBML level 2 version 1
// Locke et al (2006)

// Defines light value depending on time of day
function LD(tod)
  piecewise();
end

model Locke_et_al_2006_3Loop()
  // SBML model of the interlocked feedback loop network
  // The model describes the three loop arabidopsis clock mode. It provides initial conditions, parameter values and rules for the production rates of the following species: LHY mRNA (cLm), cytoplasmic LHY (cLc), nuclear LHY (cLn), TOC1 mRNA (cTm), cytoplasmic TOC1 (cTc), nuclear TOC1 (cTn), X mRNA (cXm), cytoplasmic X (cXc), nuclear X (cXn), Y mRNA (cYm), cytoplasmic Y (cYc), nuclear Y (cYn), nuclear P (cPn), APRR7/9 mRNA, cytoplasmic APRR7/9, and nuclear APRR7/9. The model was validated using the SBML Toolbox for Matlab.

  // Compartments:
  compartment compartment = 1;

  // Species:
  species cLm in compartment = 0.4625;
  species cLc in compartment = 0.0132;
  species cLn in compartment = 0.0699;
  species cTm in compartment = 0.4303;
  species cTc in compartment = 10.2965;
  species cTn in compartment = 0.5402;
  species cXm in compartment = 0.0957;
  species cXc in compartment = 1.5413;
  species cXn in compartment = 0.4585;
  species cYm in compartment = 0.0303;
  species cYc in compartment = 0.0041;
  species cYn in compartment = 0.0122;
  species cPn in compartment = 0.8476;
  species cAm in compartment = 14.6921;
  species cAc in compartment = 0.7027;
  species cAn in compartment = 0.8648;

  // Parameters:
  q1 = 4.1954;
  n0 = 0.05;
  g0 = 1;
  alpha = 4;
  n1 = 7.8142;
  a = 1.2479;
  g1 = 3.1383;
  m1 = 1.999;
  k1 = 2.392;
  p1 = 0.8295;
  r1 = 16.8363;
  r2 = 0.1687;
  m2 = 20.44;
  k2 = 1.5644;
  m3 = 3.6888;
  k3 = 1.2765;
  n2 = 3.0087;
  b = 1.0258;
  g2 = 0.0368;
  g3 = 0.2658;
  c = 1.0258;
  m4 = 3.8231;
  k4 = 2.5734;
  p2 = 4.324;
  r3 = 0.3166;
  r4 = 2.1509;
  m5 = 0.0013;
  m6 = 3.1741;
  k5 = 2.7454;
  m7 = 0.0492;
  m8 = 4.0424;
  k6 = 0.4033;
  n3 = 0.2431;
  d = 1.4422;
  g4 = 0.5388;
  m9 = 10.1132;
  k7 = 6.5585;
  p3 = 2.147;
  r5 = 1.0352;
  r6 = 3.3017;
  m10 = 0.2179;
  k8 = 0.6632;
  m11 = 3.3442;
  k9 = 17.1111;
  q2 = 2.4017;
  n4 = 0.0857;
  n5 = 0.1649;
  g5 = 1.178;
  g6 = 0.0645;
  e = 3.6064;
  f = 1.0237;
  m12 = 4.297;
  k10 = 1.7303;
  p4 = 0.2485;
  r7 = 2.2123;
  r8 = 0.2002;
  m13 = 0.1347;
  k11 = 1.8258;
  m14 = 0.6114;
  k12 = 1.8066;
  p5 = 0.5;
  k13 = 1.2;
  m15 = 1.2;
  q3 = 1;
  q4 = 2.4514;
  g = 1.0258;
  n6 = 8.0706;
  g7 = 0.0004;
  m16 = 12.2398;
  k14 = 10.3617;
  p6 = 0.2907;
  r9 = 0.2528;
  r10 = 0.2212;
  m17 = 4.4505;
  k15 = 0.0703;
  m18 = 0.0156;
  k16 = 0.6104;
  Lmax = 1;
  Lmin = 0;
  CP = 24;
  dayLength = 12;
  timeOfDay = 0;

  // Rate rules:
  // Rate of production of LHY mRNA
  cLm' = g0^alpha/(g0^alpha + cAn^alpha)*(LD(timeOfDay)*(q1*cPn + n0) + n1*cXn^a/(g1^a + cXn^a)) - m1*cLm/(k1 + cLm);
  // Rate of production of cytoplasmic LHY
  cLc' = p1*cLm - r1*cLc + r2*cLn - m2*cLc/(k2 + cLc);
  // Rate of production of nuclear LHY
  cLn' = r1*cLc - r2*cLn - m3*cLn/(k3 + cLn);
  // Rate of production of TOC1 mRNA
  cTm' = n2*cYn^b/(g2^b + cYn^b)*(g3^c/(g3^c + cLn^c)) - m4*cTm/(k4 + cTm);
  // Rate of production of cytoplasmic TOC1
  cTc' = p2*cTm - r3*cTc + r4*cTn - ((Lmax - LD(timeOfDay))*m5 + m6)*(cTc/(k5 + cTc));
  // Rate of production of nuclear TOC1
  cTn' = r3*cTc - r4*cTn - ((Lmax - LD(timeOfDay))*m7 + m8)*(cTn/(k6 + cTn));
  // Rate of production of X mRNA
  cXm' = n3*cTn^d/(g4^d + cTn^d) - m9*cXm/(k7 + cXm);
  // Rate of production of cytoplasmic X
  cXc' = p3*cXm - r5*cXc + r6*cXn - m10*cXc/(k8 + cXc);
  // Rate of production of nuclear X
  cXn' = r5*cXc - r6*cXn - m11*cXn/(k9 + cXn);
  // Rate of production of Y mRNA
  cYm' = (LD(timeOfDay)*q2*cPn + (LD(timeOfDay)*n4 + n5)*g5^e/(g5^e + cTn^e))*(g6^f/(g6^f + cLn^f)) - m12*cYm/(k10 + cYm);
  // Rate of production of cytoplasmic Y
  cYc' = p4*cYm - r7*cYc + r8*cYn - m13*cYc/(k11 + cYc);
  // Rate of production of nuclear Y
  cYn' = r7*cYc - r8*cYn - m14*cYn/(k12 + cYn);
  // Rate of production of nuclear P
  cPn' = (Lmax - LD(timeOfDay))*p5 - m15*cPn/(k13 + cPn) - q3*LD(timeOfDay)*cPn;
  // Rate of production of APRR7/9 mRNA
  cAm' = LD(timeOfDay)*q4*cPn + n6*cLn^g/(g7^g + cLn^g) - m16*cAm/(k14 + cAm);
  // Rate of production of cytoplasmic APRR7/9
  cAc' = p6*cAm - r9*cAc + r10*cAn - m17*cAc/(k15 + cAc);
  // Rate of production of nuclear APRR7/9
  cAn' = r9*cAc - r10*cAn - m18*cAn/(k16 + cAn);
  // Flow of time
  timeOfDay' = 1;

  // Events:
  // If time of day reaches end of day, set back to zero
  at (timeOfDay >= CP): timeOfDay = 0;

  // Unit definitions:
  unit time = 3600 second;
end
