// SBML level 3 version 1

model P2011()
  // model units - substance: substance, time: time_unit

  // Compartments:
  compartment compartment_ = 1;

  // Species:
  species cL_m in compartment_ = 1.05129;
  species cL in compartment_ = 0.5393536;
  species cLmod in compartment_ = 0.0844582;
  species cP in compartment_ = 0.9563919;
  species cP9_m in compartment_ = 0.06560635;
  species cP9 in compartment_ = 0.02411604;
  species cP7_m in compartment_ = 0.4296861;
  species cP7 in compartment_ = 0.1249702;
  species cP5_m in compartment_ = 0.07780014;
  species cP5 in compartment_ = 0.06829321;
  species cT_m in compartment_ = 0.09287982;
  species cT in compartment_ = 0.04134787;
  species cE4_m in compartment_ = 0.09498864;
  species cE4 in compartment_ = 0.1982184;
  species cE3_m in compartment_ = 0.282857;
  species cE3 in compartment_ = 0.1439116;
  species cE3n in compartment_ = 0.0276005;
  species cLUX_m in compartment_ = 0.09498864;
  species cLUX in compartment_ = 0.5536634;
  species cCOP1c in compartment_ = 0.3269277;
  species cCOP1n in compartment_ = 0.6558904;
  species cCOP1d in compartment_ = 0.2511719;
  species cEG in compartment_ = 0.003814908;
  species cEC in compartment_ = 0.06899054;
  species cZTL in compartment_ = 0.250996;
  species cZG in compartment_ = 0.07732248;
  species cG_m in compartment_ = 0.09683009;
  species cG in compartment_ = 0.01910175;

  // Parameters:
  q1 = 353.7463;
  light = 1;
  n1 = 766.4502;
  g1 = 39669.75;
  gml = 1;
  m1 = 0.54;
  m2 = 0.24;
  p2 = 56.49527;
  p1 = 27.20143;
  m3 = 0.2;
  p3 = 6168.207;
  g3 = 37009.24;
  m4 = 0.2;
  p7 = 0.3;
  m11 = 1;
  q3 = 185.0617;
  g8 = 16.50597;
  n4 = 4.626542;
  n7 = 13.21869;
  g9 = 18504.62;
  gmp9 = 1;
  m12 = 1;
  p8 = 3601.241;
  m13 = 0.32;
  m22 = 0.1;
  n8 = 50.78623;
  g10 = 30841.04;
  n9 = 20.31449;
  g11 = 277688.2;
  gmp7 = 1;
  m14 = 0.4;
  p9 = 3124.449;
  m15 = 0.7;
  m23 = 1.8;
  n10 = 36.72889;
  g12 = 12336.41;
  n11 = 55.09333;
  g13 = 396697.5;
  gmp5 = 1;
  m16 = 0.5;
  p10 = 2332.95;
  m17 = 0.5;
  m24 = 0.1;
  n2 = 165.6533;
  g4 = 16.50597;
  g5 = 9252.311;
  gmt = 1;
  m5 = 0.3;
  p4 = 858.2768;
  m6 = 0.0001817524;
  m7 = 0.0004240889;
  p5 = 4;
  m8 = 0.4;
  n13 = 264.6409;
  g2 = 16.50597;
  g6 = 18504.62;
  gme4 = 1;
  m34 = 0.6;
  p23 = 3.000056;
  m35 = 0.3;
  p25 = 0.00484673;
  p21 = 1;
  p26 = 0.0001817524;
  m37 = 0.8;
  m36 = 0.1;
  n3 = 32.79733;
  g16 = 18504.62;
  gme3 = 1;
  m26 = 0.5;
  p16 = 9.048829;
  m9 = 1.1;
  p19 = 1;
  p20 = 0.1;
  m29 = 5;
  m30 = 3;
  p17 = 0.002908038;
  p28 = 2;
  p29 = 0.1;
  m19 = 0.2;
  gmlux = 1;
  p27 = 6.486607;
  m39 = 0.3;
  n5 = 0.23;
  m27 = 0.1;
  p15 = 3;
  p6 = 0.6;
  n6 = 20;
  n14 = 0.1;
  m31 = 0.3;
  m33 = 13;
  q2 = 84.80706;
  n12 = 679.5437;
  g14 = 6.60239;
  g15 = 24672.83;
  gmg = 1;
  m18 = 3.4;
  p11 = 15.48474;
  p12 = 0.00205986;
  p13 = 0.1;
  p14 = 231.0836;
  m20 = 0.6;
  m21 = 0.08;
  p18 = 4;
  p31 = 0.1;
  m10 = 1;
  m32 = 0.2;
  p24 = 10;
  g7 = 990.3584;
  m25 = 1.8;
  m28 = 20;
  m38 = 0.5;
  p22 = 0.5;
  p30 = 0.9;

  // Reactions:
  cL_m_trscr: => cL_m; compartment_*(q1*light*cP + n1*(g1^2/(g1^2 + (cP9 + cP7 + cP5 + cT)^2)))*gml;  // modifiers: cP, cP9, cT, cP5, cP7
  cL_m_degr: cL_m => ; compartment_*(m1*light + m2*(1 - light))*cL_m;
  cL_trsl: => cL; compartment_*(p2 + p1*light)*cL_m/gml;  // modifiers: cL_m
  cL_degr: cL => ; compartment_*(m3*cL + p3*cL^2/(g3^2 + cL^2));
  cL_modif: => cLmod; compartment_*(p3*cL^2/(g3^2 + cL^2));  // modifiers: cL
  cLm_degr: cLmod => ; compartment_*m4*cLmod;
  cP_trsl: => cP; compartment_*p7*(1 - light)*(1 - cP);
  cP_degr: cP => ; compartment_*m11*cP*light;
  cP9_m_trscr: => cP9_m; compartment_*(light*q3*cP + g8/(g8 + cEC)*(n4 + n7*(cL^2/(g9^2 + cL^2))))*gmp9;  // modifiers: cP, cL, cEC
  cP9_m_degr: cP9_m => ; compartment_*m12*cP9_m;
  cP9_trsl: => cP9; compartment_*p8*cP9_m/gmp9;  // modifiers: cP9_m
  cP9_degr: cP9 => ; compartment_*(m13 + m22*(1 - light))*cP9;
  cP7_m_trscr: => cP7_m; compartment_*(n8*((cL + cLmod)^2/(g10^2 + (cL + cLmod)^2)) + n9*(cP9^2/(g11^2 + cP9^2)))*gmp7;  // modifiers: cLmod, cP9, cL
  cP7_m_degr: cP7_m => ; compartment_*m14*cP7_m;
  cP7_trsl: => cP7; compartment_*p9*cP7_m/gmp7;  // modifiers: cP7_m
  cP7_degr: cP7 => ; compartment_*(m15 + m23*(1 - light))*cP7;
  cP5_m_trscr: => cP5_m; compartment_*(n10*(cLmod^2/(g12^2 + cLmod^2)) + n11*(cP7^2/(g13^2 + cP7^2)))*gmp5;  // modifiers: cLmod, cP7
  cP5_m_degr: cP5_m => ; compartment_*m16*cP5_m;
  cP5_trsl: => cP5; compartment_*p10*cP5_m/gmp7;  // modifiers: cP5_m
  cP5_degr: cP5 => ; compartment_*(m17 + m24*(1 - light))*cP5;
  cT_m_trscr: => cT_m; compartment_*n2*(g4/(g4 + cEC))*(g5^2/(g5^2 + cL^2))*gmt;  // modifiers: cL, cEC
  cT_m_degr: cT_m => ; compartment_*m5*cT_m;
  cT_trsl: => cT; compartment_*p4*cT_m/gmt;  // modifiers: cT_m
  cT_degr: cT => ; compartment_*((m6 + m7*(1 - light))*cT*(cZTL*p5 + cZG) + m8*cT);  // modifiers: cZTL, cZG
  cE4_m_trscr: => cE4_m; compartment_*n13*(g2/(cEC + g2))*(g6^2/(cL^2 + g6^2))*gme4;  // modifiers: cL, cEC
  cE4_m_degr: cE4_m => ; compartment_*m34*cE4_m;
  cE4_trsl: => cE4; compartment_*p23*cE4_m/gme4;  // modifiers: cE4_m
  cE4_degr: cE4 => ; compartment_*(m35*cE4 + p25*cE4*cE3n - p21*p25*cE4*cE3n/(p26*cLUX + p21 + m37*cCOP1d + m36*cCOP1n));  // modifiers: cCOP1d, cCOP1n, cE3n, cLUX
  cE3_m_trscr: => cE3_m; compartment_*(n3*g16^2/(cL^2 + g16^2))*gme3;  // modifiers: cL
  cE3_m_degr: cE3_m => ; compartment_*m26*cE3_m;
  cE3_trsl: => cE3; compartment_*p16*cE3_m/gme3;  // modifiers: cE3_m
  cE3_degr: cE3 => ; compartment_*m9*cE3*cCOP1c;  // modifiers: cCOP1c
  cE3n_import: cE3 => cE3n; compartment_*(p19*cE3 - p20*cE3n);
  cE3n_degr: cE3n => ; compartment_*(m29*cE3n*cCOP1n + m30*cE3n*cCOP1d + p25*cE4*cE3n - p21*p25*cE4*cE3n/(p26*cLUX + p21 + m37*cCOP1d + m36*cCOP1n) + p17*cE3n*p28*cG/(p29 + m19 + p17*cE3n));  // modifiers: cCOP1d, cCOP1n, cE4, cG, cLUX
  cLUX_m_trscr: => cLUX_m; compartment_*n13*(g2/(g2 + cEC))*(g6^2/(g6^2 + cL^2))*gmlux;  // modifiers: cL, cEC
  cLUX_m_degr: cLUX_m => ; compartment_*m34*cLUX_m;
  cLUX_trsl: => cLUX; compartment_*p27*cLUX_m/gmlux;  // modifiers: cLUX_m
  cLUX_degr: cLUX => ; compartment_*(m39*cLUX + p26*cLUX*p25*cE4*cE3n/(p26*cLUX + p21 + m37*cCOP1d + m36*cCOP1n));  // modifiers: cCOP1d, cCOP1n, cE4, cE3n
  cCOP1c_trsl: => cCOP1c; compartment_*n5;
  cCOP1c_degr: cCOP1c => ; compartment_*m27*cCOP1c*(1 + p15*light);
  cCOP1n_import: cCOP1c => cCOP1n; compartment_*p6*cCOP1c;
  cCOP1n_degr: cCOP1n => ; compartment_*m27*cCOP1n*(1 + p15*light);
  cCOP1d_activ: cCOP1n => cCOP1d; compartment_*(n6*light*cP*cCOP1n + n14*cCOP1n);  // modifiers: cP
  cCOP1d_degr: cCOP1d => ; compartment_*m31*(1 + m33*(1 - light))*cCOP1d;
  cG_m_trscr: => cG_m; compartment_*(light*q2*cP + n12*(g14/(g14 + cEC))*(g15^2/(cL^2 + g15^2)))*gmg;  // modifiers: cP, cL, cEC
  cG_m_degr: cG_m => ; compartment_*m18*cG_m;
  cG_trsl: => cG; compartment_*p11*cG_m/gmg;  // modifiers: cG_m
  cG_degr: cG => ; compartment_*(m19*cG + p28*cG - p29*p28*cG/(p29 + m19 + p17*cE3n));  // modifiers: cE3n
  cG_cZTL_assoc: cG + cZTL => cZG; compartment_*(p12*light*cZTL*cG - p13*(1 - light)*cZG);
  cZTL_trsl: => cZTL; compartment_*p14;
  cZTL_degr: cZTL => ; compartment_*m20*cZTL;
  cZG_degr: cZG => ; compartment_*m21*cZG;
  cG_cE3_assoc: cG + cE3 => cEG; compartment_*p17*cE3*cG;
  cEG_degr: cEG => ; compartment_*(m9*cEG*cCOP1c + p18*cEG - p31*(p18*cEG + p17*cE3n*p28*cG/(p29 + m19 + p17*cE3n))/(m9*cCOP1n + m10*cCOP1d + p31));  // modifiers: cCOP1d, cCOP1c, cCOP1n, cE3n, cG
  cEC_form: => cEC; compartment_*(p26*cLUX*p25*cE4*cE3n/(p26*cLUX + p21 + m37*cCOP1d + m36*cCOP1n));  // modifiers: cCOP1d, cCOP1n, cE4, cE3n, cLUX
  cEC_degr: cEC => ; compartment_*(m36*cCOP1n*cEC + m37*cCOP1d*cEC + m32*cEC*(1 + p24*light*(p28*cG/(p29 + m19 + p17*cE3n) + (p18*cEG + p17*cE3n*p28*cG/(p29 + m19 + p17*cE3n))/(m9*cCOP1n + m10*cCOP1d + p31))^2/((p28*cG/(p29 + m19 + p17*cE3n) + (p18*cEG + p17*cE3n*p28*cG/(p29 + m19 + p17*cE3n))/(m9*cCOP1n + m10*cCOP1d + p31))^2 + g7^2)));  // modifiers: cCOP1d, cEG, cCOP1n, cE3n, cG

  // Unit definitions:
  unit substance = 1e-9 mole; substance is "nM (default)";
  unit time_unit = 3600 second; time_unit is "hour (default)";
end
